<?xml version="1.0"?>
<!--
  File:     engIO540AB1A5.xml
  Author:   Aero-Matic v 0.8

  Inputs:
    name:           engIO540AB1A5
    type:           piston
    power:          230.0 hp
    augmented?      no
    injected?       no
-->

<piston_engine name="IO540AB1A5">
    <air-intake-impedance-factor>0.18</air-intake-impedance-factor>
    <ram-air-factor>0.1</ram-air-factor>
    <minmp unit="INHG">         15.0 </minmp>
    <maxmp unit="INHG">         23 </maxmp>
    <displacement unit="IN3">  541.5 </displacement>
    <bore unit="IN">5.125</bore>
    <stroke unit="IN">4.375</stroke>
    <cylinder-head-mass unit="KG"> 0.1</cylinder-head-mass>
    <compression-ratio>8.7</compression-ratio>
    <volumetric-efficiency>0.88</volumetric-efficiency>
    <bsfc unit="LBS/HP*HR">0.445</bsfc>
    <maxhp>        230.0 </maxhp>
    <cycles>         4.0 </cycles>
    <idlerpm>      650.0 </idlerpm> <!--POH Cessna 182S Page: 4-23-->
    <maxrpm>      2400 </maxrpm>
    <maxthrottle>    1.0 </maxthrottle>
    <minthrottle>    0.0 </minthrottle>
    <sparkfaildrop>  0.15 </sparkfaildrop>

    <!-- cooling -->
    <!-- Oil temp: level cruise: between 165degF and 200 degF, but not <100-->
    <!--   set by cowl flaps; see c182s.xml <cooling-factor>0.75</cooling-factor>-->

    <!-- oil pressure definitions -->
    <!-- min=55; max=95; idle=25; start&warm-up=115 -->
    <oil-pressure-relief-valve-psi>   70    </oil-pressure-relief-valve-psi> <!-- Stabilize at this pres when RPM>pressure-rpm-max -->
    <oil-pressure-rpm-max>          1800    </oil-pressure-rpm-max> <!-- RPM at which oil pres stabilizes -->
    <design-oil-temp-degK>           358    </design-oil-temp-degK> <!-- Oil pres=relief-valve-psi at this temp when RPM>pressure-rpm-max -->
    <oil-viscosity-index>              0.20 </oil-viscosity-index>  <!-- how sensitive oil pres is to oil temp (psi/°k); 0.25 is default jsbsim value -->

</piston_engine>
