<?xml version="1.0"?>

<propeller name="79 inch, 3 blade variable-pitch propeller" version="1.1">
  <ixx> 1.67 </ixx>
  <diameter unit="IN"> 79.0 </diameter>
  <numblades> 3 </numblades>
  <minpitch> 14.9 </minpitch>
  <maxpitch> 31.7 </maxpitch>
  <minrpm>    900 </minrpm>
  <maxrpm>   2400 </maxrpm>
  <constspeed> 1 </constspeed>


  <table name="C_THRUST" type="internal">
    <tableData>
           14.9    21.0    26.0    32.0
      0.10  0.0818  0.0910  0.0870  0.0950
      0.15  0.0795  0.0910  0.0882  0.0933
      0.20  0.0770  0.0900  0.0889  0.0925
      0.25  0.0742  0.0884  0.0890  0.0915
      0.30  0.0702  0.0860  0.0890  0.0908
      0.35  0.0660  0.0832  0.0886  0.0898
      0.40  0.0612  0.0801  0.0880  0.0888
      0.45  0.0560  0.0757  0.0864  0.0882
      0.50  0.0500  0.0708  0.0845  0.0880
      0.55  0.0416  0.0655  0.0817  0.0877
      0.60  0.0330  0.0591  0.0780  0.0870
      0.65  0.0248  0.0520  0.0732  0.0858
      0.70  0.0175  0.0450  0.0672  0.0830
      0.75  0.0105  0.0368  0.0610  0.0800
      0.80 -0.0010  0.0294  0.0547  0.0752
      0.85 -0.0010  0.0224  0.0483  0.0703
      0.90 -0.0010 -0.0010  0.0416  0.0651
      0.95 -0.0010 -0.0010  0.0349  0.0591
      1.00 -0.0010 -0.0010  0.0280  0.0530
      1.05 -0.0010 -0.0010  0.0211  0.0467
      1.10 -0.0010 -0.0010  0.0142  0.0402
      1.15 -0.0010 -0.0010  0.0072  0.0337
      1.20 -0.0010 -0.0010 -0.0010  0.0270
      1.25 -0.0010 -0.0010 -0.0010  0.0201
      1.30 -0.0010 -0.0010 -0.0010  0.0130
      1.35 -0.0010 -0.0010 -0.0010  0.0056
      1.40 -0.0010 -0.0010 -0.0010 -0.0010
    </tableData>
  </table>

  <table name="C_POWER" type="internal">
    <tableData>
           17.0    21.0    26.0    32.0
      0.10  0.0400  0.0520  0.0769  0.1055
      0.15  0.0400  0.0521  0.0755  0.1029
      0.20  0.0400  0.0523  0.0740  0.1000
      0.25  0.0400  0.0525  0.0720  0.0972
      0.30  0.0397  0.0526  0.0695  0.0950
      0.35  0.0392  0.0527  0.0676  0.0922
      0.40  0.0384  0.0528  0.0663  0.0900
      0.45  0.0370  0.0523  0.0656  0.0880
      0.50  0.0348  0.0513  0.0658  0.0863
      0.55  0.0302  0.0498  0.0659  0.0852
      0.60  0.0255  0.0472  0.0656  0.0839
      0.65  0.0208  0.0436  0.0646  0.0835
      0.70  0.0164  0.0394  0.0620  0.0822
      0.75  0.0115  0.0345  0.0588  0.0814
      0.80  0.0000  0.0294  0.0551  0.0791
      0.85  0.0000  0.0238  0.0510  0.0766
      0.90  0.0000  0.0000  0.0461  0.0739
      0.95  0.0000  0.0000  0.0408  0.0700
      1.00  0.0000  0.0000  0.0349  0.0652
      1.05  0.0000  0.0000  0.0284  0.0597
      1.10  0.0000  0.0000  0.0214  0.0536
      1.15  0.0000  0.0000  0.0140  0.0469
      1.20  0.0000  0.0000  0.0000  0.0398
      1.25  0.0000  0.0000  0.0000  0.0321
      1.30  0.0000  0.0000  0.0000  0.0240
      1.35  0.0000  0.0000  0.0000  0.0157
    </tableData>
  </table>


</propeller>
